// COMSOL Multiphysics 5.2.0.166 model "testDistr.mph"
// Outline of the model tree

Parameters
  disp = 0  // displacement
  E1 = 2[MPa]  // young mod
  nu1 = 0.495  // poisson

Functions
  an1: Analytic | expr = exp(-(x-b)^2/(2*0.01^2)); args = {x, b}

Probes
  bnd1: Boundary "Boundary Probe 1" on boundaries 1 | type = integral; expr = solid.FperLengthy; table = tbl2
  bnd2: Boundary "Boundary Probe 2" on boundaries 1 | type = integral; expr = solid.FperLengthx; table = tbl2
  pdom1: DomainPoint "Domain Point Probe 1" | frame = material; coords = {0, 0.99}
    ppb1: PointExpr "Point Probe Expression 1" | expr = x; table = tbl2
    ppb2: PointExpr "Point Probe Expression 2" | expr = y; table = tbl2
  pdom2: DomainPoint "Domain Point Probe 2" | frame = material; coords = {0, 0.9}
    ppb3: PointExpr "Point Probe Expression 3" | expr = x; unit = mm; table = tbl2
    ppb2: PointExpr "Point Probe Expression 2" | probename = pdom2_ppb2; expr = y; table = tbl2
  pdom3: DomainPoint "Domain Point Probe 3" | frame = material; coords = {0, 0.8}
    ppb4: PointExpr "Point Probe Expression 4" | expr = x; unit = mm; table = tbl2
    ppb2: PointExpr "Point Probe Expression 2" | probename = pdom3_ppb2; expr = y; table = tbl2
  pdom4: DomainPoint "Domain Point Probe 4" | frame = material; coords = {0, 0.7}
    ppb5: PointExpr "Point Probe Expression 5" | expr = x; unit = mm; table = tbl2
    ppb2: PointExpr "Point Probe Expression 2" | probename = pdom4_ppb2; expr = y; table = tbl2
  pdom5: DomainPoint "Domain Point Probe 5" | frame = material; coords = {0, 0.6}
    ppb6: PointExpr "Point Probe Expression 6" | expr = x; unit = mm; table = tbl2
    ppb2: PointExpr "Point Probe Expression 2" | probename = pdom5_ppb2; expr = y; table = tbl2
  pdom6: DomainPoint "Domain Point Probe 6" | frame = material; coords = {0, 0.5}
    ppb7: PointExpr "Point Probe Expression 7" | expr = x; unit = mm; table = tbl2
    ppb2: PointExpr "Point Probe Expression 2" | probename = pdom6_ppb2; expr = y; table = tbl2
  pdom7: DomainPoint "Domain Point Probe 7" | frame = material; coords = {0, 0.4}
    ppb8: PointExpr "Point Probe Expression 8" | expr = x; unit = mm; table = tbl2
    ppb2: PointExpr "Point Probe Expression 2" | probename = pdom7_ppb2; expr = y; table = tbl2
  pdom8: DomainPoint "Domain Point Probe 8" | frame = material; coords = {0, 0.3}
    ppb9: PointExpr "Point Probe Expression 9" | expr = x; unit = mm; table = tbl2
    ppb2: PointExpr "Point Probe Expression 2" | probename = pdom8_ppb2; expr = y; table = tbl2
  pdom9: DomainPoint "Domain Point Probe 9" | frame = material; coords = {0, 0.2}
    ppb10: PointExpr "Point Probe Expression 10" | expr = x; unit = mm; table = tbl2
    ppb2: PointExpr "Point Probe Expression 2" | probename = pdom9_ppb2; expr = y; table = tbl2
  pdom10: DomainPoint "Domain Point Probe 10" | frame = material; coords = {0, 0.1}
    ppb11: PointExpr "Point Probe Expression 11" | expr = x; unit = mm; table = tbl2
    ppb2: PointExpr "Point Probe Expression 2" | probename = pdom10_ppb2; expr = y; table = tbl2

Geometry
  geom1 "Geometry 1" (2D, length unit mm)
    r3: Rectangle | pos = {-0.1, 0}; type = solid; base = corner; size = {0.2, 1}
    fin: Finalize "Form Union"

Materials
  mat2: Common "Iron [solid,polished]" on no domains
    def "Basic"
      dL = (dL_solid_1(T[1/K])-dL_solid_1(Tempref[1/K]))/(1+dL_solid_1(Tempref[1/K]))
      CTE = CTE(T[1/K])[1/K]
      thermalconductivity = k_solid_1(T[1/K])[W/(m*K)]
      resistivity = res_solid_1(T[1/K])[ohm*m]
      emissivity = epsilon(T[1/K])
      thermalexpansioncoefficient = (alpha_solid_1(T[1/K])[1/K]+(Tempref-293[K])*if(abs(T-Tempref)>1e-3,(alpha_solid_1(T[1/K])[1/K]-alpha_solid_1(Tempref[1/K])[1/K])/(T-Tempref),d(alpha_solid_1(T[1/K])[1/K],T)))/(1+alpha_solid_1(Tempref[1/K])[1/K]*(Tempref-293[K]))
      heatcapacity = C_solid_1(T[1/K])[J/(kg*K)]
      HC = HC_solid_1(T[1/K])[J/(mol*K)]
      electricconductivity = sigma_solid_1(T[1/K])[S/m]
      nemiss = nemiss_solid_polished_1(T[1/K])
      density = rho_solid_1(T[1/K])[kg/m^3]
      VP = VP_solid_1(T[1/K])[Pa]
      dL_solid_1: Piecewise
        arg = T
        extrap = constant
        pieces = 
          {0.0, 30.0, -0.001971436}
          {30.0, 110.0, -0.001910556-3.518812E-6*T^1+5.140443E-8*T^2-5.849422E-11*T^3}
          {110.0, 215.0, -0.002967233+1.81617E-5*T^1-9.276156E-8*T^2+2.54081E-10*T^3}
          {215.0, 960.0, -0.002341855+4.083948E-6*T^1+1.512293E-8*T^2-6.083782E-12*T^3}
      CTE: Piecewise
        arg = T
        extrap = constant
        pieces = 
          {91.0, 400.0, -3.482149E-6+1.265098E-7*T^1-3.745646E-10*T^2+4.692131E-13*T^3-1.879297E-16*T^4}
          {400.0, 550.0, 3.718357E-5-1.761777E-7*T^1+3.878031E-10*T^2-2.554622E-13*T^3}
          {550.0, 960.0, -7.251939E-6+6.376279E-8*T^1-4.206483E-11*T^2}
      k_solid_1: Piecewise "Piecewise 1a"
        arg = T
        extrap = constant
        pieces = 
          {0.0, 20.0, 161.9832*T^1+4.851772*T^2-0.7906936*T^3+0.01675048*T^4}
          {20.0, 68.5, 2218.339+23.88314*T^1-5.081026*T^2+0.1373453*T^3-0.001490064*T^4+5.882957E-6*T^5}
          {68.5, 155.0, 1682.9-46.91385*T^1+0.5423243*T^2-0.002845324*T^3+5.647112E-6*T^4}
          {155.0, 1183.0, 155.6355-0.4470943*T^1+8.9922E-4*T^2-9.859391E-7*T^3+4.862049E-10*T^4-7.562752E-14*T^5}
          {1183.0, 1810.0, -5.097463+0.03983086*T^1-9.936321E-6*T^2}
      res_solid_1: Piecewise "Piecewise 1b"
        arg = T
        extrap = constant
        pieces = 
          {100.0, 1100.0, 1.408983E-8+8.537916E-12*T^1+8.678851E-13*T^2}
          {1100.0, 1500.0, -3.863736E-6+1.016878E-8*T^1-6.951621E-12*T^2+1.625296E-15*T^3}
      epsilon: Piecewise | arg = T; extrap = constant; pieces = {293.0, 800.0, -0.02476819+1.854053E-4*T^1+2.719503E-8*T^2}
      alpha_solid_1: Piecewise "Piecewise 1c" | arg = T; extrap = constant; pieces = {0.0, 960.0, 6.78762E-6+2.878178E-8*T^1-7.594277E-11*T^2+1.43191E-13*T^3-1.357067E-16*T^4+4.830576E-20*T^5}
      C_solid_1: Piecewise "Piecewise 1d"
        arg = T
        extrap = constant
        pieces = 
          {1.0, 20.0, 0.01640777+0.0734379*T^1+0.003543513*T^2+3.434114E-5*T^3+8.786827E-6*T^4}
          {20.0, 130.0, -4.129967+0.9005499*T^1-0.05588171*T^2+0.001972324*T^3-1.807849E-5*T^4+5.251765E-8*T^5}
          {130.0, 500.0, -143.8118+5.191206*T^1-0.0178093*T^2+2.868283E-5*T^3-1.683141E-8*T^4}
          {500.0, 1000.0, 3998.51-21.89081*T^1+0.05023704*T^2-4.990048E-5*T^3+1.85287E-8*T^4}
          {1000.0, 1042.0, -560642.6+1783.888*T^1-1.88951*T^2+6.672367E-4*T^3}
          {1042.0, 1184.0, 5927268.0-20371.74*T^1+26.25897*T^2-0.01504264*T^3+3.231248E-6*T^4}
          {1184.0, 1665.0, 429.5303+0.1496811*T^1}
          {1665.0, 1809.0, 440.2844+0.17782*T^1}
      HC_solid_1: Piecewise "Piecewise 1e"
        arg = T
        extrap = constant
        pieces = 
          {1.0, 20.0, 9.163245E-4+0.004101286*T^1+1.978946E-4*T^2+1.91785E-6*T^3+4.907179E-7*T^4}
          {20.0, 130.0, -0.2306463+0.05029302*T^1-0.003120827*T^2+1.101484E-4*T^3-1.00963E-6*T^4+2.932953E-9*T^5}
          {130.0, 500.0, -8.031456+0.2899134*T^1-9.945962E-4*T^2+1.60185E-6*T^3-9.399837E-10*T^4}
          {500.0, 1000.0, 223.3048-1.222536*T^1+0.002805589*T^2-2.786791E-6*T^3+1.034772E-9*T^4}
          {1000.0, 1042.0, -31310.22+99.62481*T^1-0.1055235*T^2+3.726318E-5*T^3}
          {1042.0, 1184.0, 331020.2-1137.7*T^1+1.466485*T^2-8.400865E-4*T^3+1.804555E-7*T^4}
          {1184.0, 1665.0, 23.98798+0.008359239*T^1}
          {1665.0, 1809.0, 24.58855+0.009930716*T^1}
      sigma_solid_1: Piecewise "Piecewise 1f"
        arg = T
        extrap = constant
        pieces = 
          {100.0, 1100.0, 1/(8.678851E-13*T^2+8.537916E-12*T+1.408983E-08)}
          {1100.0, 1500.0, 1/(1.625296E-15*T^3-6.951621E-12*T^2+1.016878E-08*T-3.863736E-06)}
      nemiss_solid_polished_1: Piecewise "Piecewise 1g" | arg = T; extrap = constant; pieces = {200.0, 1093.0, 0.023092+2.143849E-4*T^1}
      rho_solid_1: Piecewise "Piecewise 1h"
        arg = T
        extrap = constant
        pieces = 
          {0.0, 30.0, 7906.743}
          {30.0, 53.0, 7905.632+0.06730164*T^1-0.001025121*T^2+4.962534E-7*T^3+1.383301E-9*T^4}
          {53.0, 190.0, 7924.0-0.4306436*T^1+0.002196832*T^2-6.010914E-6*T^3}
          {190.0, 960.0, 7910.967-0.100271*T^1-3.511597E-4*T^2+1.470685E-7*T^3}
      VP_solid_1: Piecewise "Piecewise 1i" | arg = T; extrap = constant; pieces = {293.0, 1811.0, (exp((-2.172300e+004/T+4.536000e-001*log10(T)+9.980810e+000-5.846000e-001/T^3)*log(10.0)))*1.333200e+002}
    Enu "Young's modulus and Poisson's ratio"
      youngsmodulus = E(T[1/K])[Pa]
      poissonsratio = nu(T[1/K])
      E: Piecewise
        arg = T
        extrap = constant
        pieces = 
          {4.0, 273.0, 2.217366E11+5020008.0*T^1-305140.4*T^2+926.6601*T^3-1.145454*T^4}
          {273.0, 1050.0, 2.109875E11+3.572844E7*T^1-106319.6*T^2}
          {1050.0, 1500.0, 2.024261E11-6.77381E7*T^1}
      nu: Piecewise
        arg = T
        extrap = constant
        pieces = 
          {4.0, 120.0, 0.2850355-1.662951E-6*T^1}
          {120.0, 273.0, 0.2848011-7.147353E-6*T^1+6.558945E-8*T^2}
          {273.0, 1053.0, 0.2712267+7.030261E-5*T^1-3.856929E-8*T^2+1.246582E-11*T^3}
          {1053.0, 1500.0, 0.3165268-1.242823E-6*T^1+1.661461E-9*T^2}
    KG "Bulk modulus and shear modulus"
      K = kappa(T[1/K])[Pa]
      G = mu(T[1/K])[Pa]
      mu: Piecewise
        arg = T
        extrap = constant
        pieces = 
          {4.0, 273.0, 8.626526E10+1636497.0*T^1-108981.6*T^2+291.1261*T^3-0.3377859*T^4}
          {273.0, 1050.0, 8.301552E10+9184755.0*T^1-38834.5*T^2}
          {1050.0, 1500.0, 7.694034E10-2.580357E7*T^1}
      kappa: Piecewise
        arg = T
        extrap = constant
        pieces = 
          {4.0, 100.0, 1.800573E11-3478717.0*T^1+151512.1*T^2-5485.327*T^3+28.28329*T^4}
          {100.0, 273.0, 1.818111E11-4.023792E7*T^1+84204.68*T^2-93.09453*T^3}
          {273.0, 1500.0, 1.842649E11-2.509462E7*T^1-28588.37*T^2}
  mat3: Common "PDMS - Polydimethylsiloxane" on domains 1
    def "Basic"
      thermalexpansioncoefficient = 9e-4[1/K]
      heatcapacity = 1460[J/(kg*K)]
      relpermittivity = 2.75
      density = 2000[kg/m^3]
      thermalconductivity = 0.16[W/(m*K)]
    Enu "Young's modulus and Poisson's ratio"
      youngsmodulus = 1000[kPa]
      poissonsratio = 0.5
    Lame "Lamé parameters"
      lambLame = E1*nu1/((1+nu1)*(1-2*nu1))
      muLame = E1/(1+nu1)

Physics
  solid: SolidMechanics on all domains
    dependent variable u = {u, v, w}
    d.d = 0.2[mm]
    lemm1: LinearElasticModel "Linear Elastic Material 1" (default)
    free1: Free (default)
    init1: init "Initial Values 1" (default)
    disp1: Displacement2 "Prescribed Displacement 1" on no domains
      Notation = StandardNotation
      Direction = {1, 1, 0}
      U0 = {0, disp, 0}
    hmm1: HyperelasticModel "Hyperelastic Material 1" on domains 1
    fix1: Fixed "Fixed Constraint 1" on boundaries 2
    bndl1: BoundaryLoad on boundaries 1 | LoadType = TotalForce; Ftot = {0, -disp*an1(s,1)[N], 0}; coordinateSystem = sys1

Mesh
  mesh1 "Mesh 1" (physics-controlled)
    size: MeshSizeDefault | hauto = 3

Studies
  std1 "Study 1"
    param: Parametric "Parametric Sweep" | pname = disp; plistarr = range(0,0.005,0.40); punit = N
    stat: Stationary | initmethod = init; initstudy = zero

Solver configurations
  sol1 "Solution 1" (study std1)
    v1: Variables "Dependent Variables 1"
      comp1_u: Field "Displacement field (Material) (comp1.u)" | scalemethod = manual; scaleval = 1e-2*0.00171240738912
    s1: Stationary "Stationary Solver 1"
      dDef: Direct
      p1: Parametric
        sweeptype = sparse
        pname = disp
        plistarr = range(0,0.005,0.40)
        punit = N
        pcontinuationmode = last
      se1: Segregated | maxsegiter = 100; segstabacc = none
        ss1: SegregatedStep
          segvar = {comp1_u}
          linsolver = dDef
          subdtech = auto
          usesubminsteprecovery = auto
          subtermauto = tol
          maxsubiter = 100
          subntolfact = 1
          subiter = 7
        ls1: LumpedStep | segvarspec = all

Datasets
  dset1: Solution | solution = sol1
  dset2: Solution "Probe Solution 2" | solution = sol1
  int1: Integral "Boundary Probe 1" on boundaries 1 | data = dset2
  int2: Integral "Boundary Probe 2" on boundaries 1 | data = dset2
  dset3: Solution "Probe Solution 3" | solution = sol1
  cpt1: CutPoint2D "Domain Point Probe 1" | data = dset2; pointy = 0.99
  cpt2: CutPoint2D "Domain Point Probe 2" | data = dset2; pointy = 0.9
  cpt3: CutPoint2D "Domain Point Probe 3" | data = dset2; pointy = 0.8
  cpt4: CutPoint2D "Domain Point Probe 4" | data = dset2; pointy = 0.7
  cpt5: CutPoint2D "Domain Point Probe 5" | data = dset2; pointy = 0.6
  cpt6: CutPoint2D "Domain Point Probe 6" | data = dset2; pointy = 0.5
  cpt7: CutPoint2D "Domain Point Probe 7" | data = dset2; pointy = 0.4
  cpt8: CutPoint2D "Domain Point Probe 8" | data = dset2; pointy = 0.3
  cpt9: CutPoint2D "Domain Point Probe 9" | data = dset2; pointy = 0.2
  cpt10: CutPoint2D "Domain Point Probe 10" | data = dset2; pointy = 0.1

Derived values
  int1: IntLine "Line Integration 1" | data = dset1; table = tbl1; expr = solid.cnt1.Tn
  pev1: EvalPoint "Boundary Probe 1" | data = int1; table = tbl2; expr = solid.FperLengthy
  pev2: EvalPoint "Boundary Probe 2" | data = int2; table = tbl2; expr = solid.FperLengthx
  pev3: EvalPoint "Point Probe Expression 1" | data = cpt1; table = tbl2; expr = x
  pev4: EvalPoint "Point Probe Expression 2" | data = cpt1; table = tbl2; expr = y
  pev5: EvalPoint "Point Probe Expression 3" | data = cpt2; table = tbl2; expr = x
  pev6: EvalPoint "Point Probe Expression 2.8" | data = cpt2; table = tbl2; expr = y
  pev7: EvalPoint "Point Probe Expression 4" | data = cpt3; table = tbl2; expr = x
  pev8: EvalPoint "Point Probe Expression 2.9" | data = cpt3; table = tbl2; expr = y
  pev9: EvalPoint "Point Probe Expression 5" | data = cpt4; table = tbl2; expr = x
  pev10: EvalPoint "Point Probe Expression 2.10" | data = cpt4; table = tbl2; expr = y
  pev11: EvalPoint "Point Probe Expression 6" | data = cpt5; table = tbl2; expr = x
  pev12: EvalPoint "Point Probe Expression 2.1" | data = cpt5; table = tbl2; expr = y
  pev13: EvalPoint "Point Probe Expression 7" | data = cpt6; table = tbl2; expr = x
  pev14: EvalPoint "Point Probe Expression 2.2" | data = cpt6; table = tbl2; expr = y
  pev15: EvalPoint "Point Probe Expression 8" | data = cpt7; table = tbl2; expr = x
  pev16: EvalPoint "Point Probe Expression 2.3" | data = cpt7; table = tbl2; expr = y
  pev17: EvalPoint "Point Probe Expression 9" | data = cpt8; table = tbl2; expr = x
  pev18: EvalPoint "Point Probe Expression 2.4" | data = cpt8; table = tbl2; expr = y
  pev19: EvalPoint "Point Probe Expression 10" | data = cpt9; table = tbl2; expr = x
  pev20: EvalPoint "Point Probe Expression 2.5" | data = cpt9; table = tbl2; expr = y
  pev21: EvalPoint "Point Probe Expression 11" | data = cpt10; table = tbl2; expr = x
  pev22: EvalPoint "Point Probe Expression 2.6" | data = cpt10; table = tbl2; expr = y

Tables
  tbl1: Table
    // Line Integration 1 (solid.cnt1.Tn)
    disp (mm) | Contact pressure (N/m)
    0 | 0
    -0.01 | 0
    -0.02 | 0
    -0.03 | 0
    -0.04 | 0
    -0.05 | 0
    -0.06 | 0
    -0.07 | 0
    -0.08 | 0
    -0.09 | 0
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  tbl2: Table "Probe Table 2"
    disp (N) | Load, y component (N), Boundary Probe 1 | Load, x component (N), Boundary Probe 2 | x-coordinate (mm), Point: (0, 0.99) | y-coordinate (mm), Point: (0, 0.99) | x-coordinate (mm), Point: (0, 0.9) | y-coordinate (mm), Point: (0, 0.9) | x-coordinate (mm), Point: (0, 0.8) | y-coordinate (mm), Point: (0, 0.8) | x-coordinate (mm), Point: (0, 0.7) | y-coordinate (mm), Point: (0, 0.7) | x-coordinate (mm), Point: (0, 0.6)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
    0 | 0 | 0 | 3.38813e-18 | 0.99 | 2.32934e-18 | 0.9 | -2.59404e-18 | 0.8 | -4.23516e-19 | 0.7 | -1.00585e-18
    0.005 | -3.09956e-06 | 6.21289e-05 | 0.0291561 | 0.989507 | 0.0252096 | 0.899577 | 0.0208845 | 0.79968 | 0.0167313 | 0.699767 | 0.0128372
    0.01 | -1.23553e-05 | 0.000123797 | 0.0582023 | 0.988022 | 0.0503267 | 0.898334 | 0.0416968 | 0.798725 | 0.033408 | 0.699072 | 0.0256347
    0.015 | -2.76763e-05 | 0.000184555 | 0.0870796 | 0.985556 | 0.0753019 | 0.89628 | 0.0623979 | 0.797144 | 0.0500005 | 0.697918 | 0.0383715
    0.02 | -4.89374e-05 | 0.000243964 | 0.115731 | 0.982126 | 0.100087 | 0.893429 | 0.0829502 | 0.794945 | 0.0664806 | 0.696314 | 0.051027
    0.025 | -7.59813e-05 | 0.000301606 | 0.144101 | 0.977751 | 0.124637 | 0.889796 | 0.103317 | 0.792142 | 0.0828207 | 0.694267 | 0.0635814
    0.03 | -0.000108621 | 0.000357079 | 0.172137 | 0.972454 | 0.148907 | 0.885401 | 0.123465 | 0.788747 | 0.0989945 | 0.691789 | 0.0760159
    0.035 | -0.00014664 | 0.000410005 | 0.199788 | 0.966261 | 0.172855 | 0.880264 | 0.143358 | 0.784779 | 0.114977 | 0.688891 | 0.0883121
    0.04 | -0.000189801 | 0.000460027 | 0.227008 | 0.959201 | 0.196442 | 0.87441 | 0.162967 | 0.780254 | 0.130744 | 0.685587 | 0.100453
    0.045 | -0.000237838 | 0.000506816 | 0.253751 | 0.951306 | 0.219628 | 0.867865 | 0.182262 | 0.775194 | 0.146273 | 0.681891 | 0.112422
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
Plots
  pg1: PlotGroup2D "Stress (solid)" | data = dset1
    surf1: Surface | expr = solid.mises
      def: Deform "Deformation" | expr = {u, v}
  pg2: PlotGroup1D "1D Plot Group 2" | data = dset1
    lngr1: LineGraph | data = dset1; expr = solid.cnt1.Tn; xdata = expr; xdataexpr = x
  pg3: PlotGroup1D "1D Plot Group 3" | data = dset1
    ptgr1: PointGraph | expr = solid.disp
  pg4: PlotGroup1D "1D Plot Group 4" | data = none
    tblp1: Table "Table Graph 1" | table = tbl1
  pg5: PlotGroup1D "Probe Plot Group 5"
    tblp1: Table "Probe Table Graph 1"
      table = tbl2
      xaxisdata = 2
      plotcolumns = {2, 3, 4, 5, 6, 7, 8, 9, 10, 11, 12, 13, 14, 15, 16, 17, 18, 19, 20, 21, 22, 23}
  pg6: PlotGroup1D "1D Plot Group 6" | data = dset1
    lngr1: LineGraph on boundaries 3 | expr = solid.FperLengthy